# Метод водяных эквивалентов
# [area: Исходные данные для теплового расчета]
P0 := 1*10^5
t1c := 20
t1h := 95
t2c := 53.938
t2h := 61.185
Gh := 1
Gc := 1
cp := 4180
# [area: Исходные данные для труб (диаметры)]
dн := 0.012
nтр := 20
lтр := 3
dвн := 0.01
ds := 0.08
# [area: Проходные сечения]
f1 := nтр*π*dвн^2/4 = 0.0015708
f2 := π*(ds^2 - nтр*dн^2)/4 = 0.0027646
dг1 := dвн = 0.01
П := π*(ds + dн*nтр) = 1.00531
dг2 := 4*f2/(π*(ds + dн*nтр)) = 0.011
# [area: Определение коэффициента теплопередачи]
Tср := (t1h + t2h)/2 = 78.0925
tср := (t1c + t2c)/2 = 36.969
Tст := (Tср + tср)/2 = 57.5307
λст := 44
λ1 := wspTHERMCONDPT(P0, Tср + 273.15)
λ2 := wspTHERMCONDPT(P0, tср + 273.15)
ρ1 := 1/wspVPT(P0, Tср + 273.15) = 972.982
ρ2 := 1/wspVPT(P0, tср + 273.15) = 993.347
ν1 := wspKINVISPT(P0, Tср + 273.15)
ν2 := wspKINVISPT(P0, tср + 273.15)
Pr1ж := wspPRANDTLEPT(P0, Tср + 273.15)
Pr2ж := wspPRANDTLEPT(P0, tср + 273.15)
Pr1ст := wspPRANDTLEPT(P0, Tст + 273.15)
Pr2ст := wspPRANDTLEPT(P0, Tст + 273.15)
cph := wspCPPT(P0, Tср + 273.15) = 4193.94
cpc := wspCPPT(P0, tср + 273.15) = 4178.72
w1 := Gh/(f1*ρ1) = 0.654297
Re1 := w1*dг1/ν1 = 17538.8
Nu1 := 0.021*Re1^0.8*Pr1ж^0.43*(Pr1ж/Pr1ст)^0.25 = 68.8694
Pr1ж := wspPRANDTLEPT(P0, Tср + 273.15) = 2.28682
α1 := Nu1*λ1/dг1 = 4584.57
w2 := Gc/(f2*ρ2) = 0.364139
Re2 := w2*dг2/ν2 = 5750.35
Pr2ж := wspPRANDTLEPT(P0, tср + 273.15) = 4.62864
Nu2 := 0.023*Re2^0.8*Pr2ж^0.4*(Pr2ж/Pr2ст)^0.25 = 47.6825
α2 := Nu2*λ2/dг2 = 2707.83
R1 := 1/(α1*π*dвн*lтр*nтр) = 0.000115718
R2 := 1/(α2*π*dн*lтр*nтр) = 0.000163266
Rст := ln(dн/dвн)/(2*π*λст*nтр*lтр) = 1.09914e-5
Rсумм := R1 + R2 + Rст = 0.000289976
K := 1/Rсумм = 3448.57
# [area: Водяные эквиваленты, NTU]
Cc := Gc*cpc = 4178.72
Ch := Gh*cph = 4193.94
Cmin := min(Cc, Ch) = 4178.72
Cmax := max(Cc, Ch) = 4193.94
Cr := Cmin/Cmax = 0.99637
NTU := K/Cmin = 0.825269
ε := (1 - e^(-NTU*(1 - Cr)))/(1 - Cr*e^(-NTU*(1 - Cr))) = 0.452507
# [area: Тепловая мощность и конечные температуры]
Q := ε*Cmin*(t1h - t1c) = 141817
t2h := t1h - Q/Ch = 61.1852
t2c := t1c + Q/Cc = 53.938
ΔTh := t1h - t2h = 33.8148
ΔTc := t2c - t1c = 33.938
ΔTmin := min(ΔTh, ΔTc) = 33.8148
ΔTmax := max(ΔTh, ΔTc) = 33.938
ΔTlg := (ΔTmax - ΔTmin)/ln(ΔTmax/ΔTmin) = 33.8764
Qalt := K*ΔTlg = 116825
